// SBML level 3 version 1

model hynne()

  // Compartments:
  compartment default_compartment = 1;

  // Species:
  species ACA in default_compartment = 1.48153;  // kegg.compound:C00084
  species ACAX in default_compartment = 1.28836;  // kegg.compound:C00084
  species ADP in default_compartment = 1.5;  // kegg.compound:C00008
  species AMP in default_compartment = 0.33;  // kegg.compound:C00020
  species ATP in default_compartment = 2.1;  // kegg.compound:C00002
  species BPG in default_compartment = 0.00027;  // kegg.compound:C00236
  species CNX in default_compartment = 5.20358;  // kegg.compound:C00042
  species $CNX0 in default_compartment = 5.6;  // kegg.compound:C00042
  species DHAP in default_compartment = 2.95;  // kegg.compound:C00111
  species EtOH in default_compartment = 19.2379;  // kegg.compound:C00469
  species EtOHX in default_compartment = 16.4514;  // kegg.compound:C00469
  species F6P in default_compartment = 0.49;  // kegg.compound:C00085
  species FBP in default_compartment = 4.64;  // kegg.compound:C00354
  species G6P in default_compartment = 4.2;  // kegg.compound:C00092
  species GAP in default_compartment = 0.115;  // kegg.compound:C00118
  species Glc in default_compartment = 0.573074;  // kegg.compound:C00293
  species GlcX in default_compartment = 1.55307;  // kegg.compound:C00293
  species $GlcX0 in default_compartment = 18.5;  // kegg.compound:C00293
  species Glyc in default_compartment = 4.196;  // kegg.compound:C00116
  species GlycX in default_compartment = 1.68478;  // kegg.compound:C00116
  species NAD in default_compartment = 0.65;  // kegg.compound:C00003
  species NADH in default_compartment = 0.33;  // kegg.compound:C00004
  species $P in default_compartment = 0;  // kegg.compound:C00009
  species PEP in default_compartment = 0.04;  // kegg.compound:C00074
  species Pyr in default_compartment = 8.7;  // kegg.compound:C00022

  // Parameters:
  Atot = 3.93;
  K10ADP = 0.17;
  K10PEP = 0.2;
  K11 = 0.3;
  K12ACA = 0.71;
  K12NADH = 0.1;
  K15DHAP = 25;
  K15INAD = 0.13;
  K15INADH = 0.034;
  K15NADH = 0.13;
  K2Glc = 1.7;
  K2IG6P = 1.2;
  K2IIG6P = 7.2;
  K3ATP = 0.1;
  K3DGlc = 0.37;
  K3Glc = 0;
  K4F6P = 0.15;
  K4G6P = 0.8;
  K4eq = 0.13;
  K5 = 0.021;
  K6DHAP = 2;
  K6FBP = 0.3;
  K6GAP = 4;
  K6IGAP = 10;
  K6eq = 0.081;
  K7DHAP = 1.23;
  K7GAP = 1.27;
  K7eq = 0.055;
  K8BPG = 0.01;
  K8GAP = 0.6;
  K8NAD = 0.1;
  K8NADH = 0.06;
  K8eq = 0.0055;
  Ntot = 0.98;
  P2 = 1;
  V10m = 343.096;
  V11m = 53.1328;
  V12m = 89.8023;
  V15m = 81.4797;
  V2f = 1014.96;
  V2r = 1014.96;
  V3m = 51.7547;
  V4f = 496.042;
  V4r = 496.042;
  V5m = 45.4327;
  V6f = 2207.82;
  V7f = 116.365;
  V7r = 116.365;
  V8f = 833.858;
  V8r = 833.858;
  Yvol = 59;
  k0 = 0.048;
  k13 = 16.72;
  k16 = 1.9;
  k18 = 24.7;
  k20 = 0.00283828;
  k22 = 2.25932;
  k23 = 3.2076;
  k24f = 432.9;
  k24r = 133.333;
  k9f = 443866;
  k9r = 1528.62;
  kappa5 = 0.15;
  ratio6 = 5;

  // Reactions:
  v_1: $GlcX0 -> GlcX; k0*(GlcX0 - GlcX);  // GO:0015758
  v_10: PEP + ADP -> Pyr + ATP; V10m*ADP*PEP/((K10PEP + PEP)*(K10ADP + ADP));  // kegg.compound:C02601
  v_11: Pyr -> ACA; V11m*Pyr/(K11 + Pyr);
  v_12: ACA + NADH -> EtOH + NAD; V12m*ACA*NADH/((K12NADH + NADH)*(K12ACA + ACA));
  v_13: 59 EtOH -> EtOHX; k13/Yvol*(EtOH - EtOHX);
  v_14: EtOHX -> $P; k0*EtOHX;
  v_15: DHAP + NADH -> Glyc + NAD; V15m*DHAP/(K15DHAP*(1 + K15INADH/NADH*(1 + NAD/K15INAD)) + DHAP*(1 + K15NADH/NADH*(1 + NAD/K15INAD)));
  v_16: 59 Glyc -> GlycX; k16/Yvol*(Glyc - GlycX);
  v_17: GlycX -> $P; k0*GlycX;
  v_18: 59 ACA -> ACAX; k18/Yvol*(ACA - ACAX);
  v_19: ACAX -> $P; k0*ACAX;
  v_2: GlcX -> 59 Glc; V2f/Yvol*(GlcX/K2Glc/(1 + GlcX/K2Glc + (P2*(GlcX/K2Glc) + 1)/(P2*(Glc/K2Glc) + 1)*(1 + Glc/K2Glc + G6P/K2IG6P + Glc*G6P/(K2Glc*K2IIG6P)))) - V2r/Yvol*(Glc/K2Glc/(1 + Glc/K2Glc + (P2*(Glc/K2Glc) + 1)/(P2*(GlcX/K2Glc) + 1)*(1 + GlcX/K2Glc) + G6P/K2IG6P + Glc*G6P/(K2Glc*K2IIG6P)));  // modifiers: G6P
  v_20: ACAX + CNX -> $P; k20*ACAX*CNX;
  v_21: $CNX0 -> CNX; k0*(CNX0 - CNX);
  v_22: ATP + G6P -> ADP; k22*ATP*G6P;
  v_23: ATP -> ADP; k23*ATP;
  v_24: AMP + ATP -> 2 ADP; k24f*AMP*ATP - k24r*ADP^2;
  v_3: Glc + ATP -> G6P + ADP; V3m*ATP*Glc/(K3DGlc*K3ATP + K3Glc*ATP + K3ATP*Glc + Glc*ATP);
  v_4: G6P -> F6P; V4f*G6P/(K4G6P + G6P + K4G6P/K4F6P*F6P) - V4r*(F6P/K4eq)/(K4G6P + G6P + K4G6P/K4F6P*F6P);
  v_5: F6P + ATP -> FBP + ADP; V5m*F6P^2/(K5*(1 + kappa5*(ATP/AMP)*(ATP/AMP)) + F6P^2);  // modifiers: AMP
  v_6: FBP -> GAP + DHAP; V6f*FBP/(K6FBP + FBP + GAP*K6DHAP*V6f/(K6eq*V6f*ratio6) + DHAP*K6GAP*V6f/(K6eq*V6f*ratio6) + FBP*GAP/K6IGAP + GAP*DHAP*V6f/(K6eq*V6f*ratio6)) - V6f*GAP*DHAP/K6eq/(K6FBP + FBP + GAP*K6DHAP*V6f/(K6eq*V6f*ratio6) + DHAP*K6GAP*V6f/(K6eq*V6f*ratio6) + FBP*GAP/K6IGAP + GAP*DHAP*V6f/(K6eq*V6f*ratio6));
  v_7: DHAP -> GAP; V7f*DHAP/(K7DHAP + DHAP + K7DHAP/K7GAP*GAP) - V7r*(GAP/K7eq)/(K7DHAP + DHAP + K7DHAP/K7GAP*GAP);
  v_8: GAP + NAD -> BPG + NADH; V8f*GAP*NAD/K8GAP/K8NAD/((1 + GAP/K8GAP + BPG/K8BPG)*(1 + NAD/K8NAD + NADH/K8NADH)) - V8r*BPG*NADH/K8eq/K8GAP/K8NAD/((1 + GAP/K8GAP + BPG/K8BPG)*(1 + NAD/K8NAD + NADH/K8NADH));
  v_9: BPG + ADP -> PEP + ATP; k9f*BPG*ADP - k9r*PEP*ATP;
end
